// SBML level 2 version 4

function Reversible_Michaelis_Menten_Keq__rev__1(B, D, E3, Kcat, Keq, Kmp, Kms)
  E3*Kcat*(B/Kms - D/Kms/Keq)*1/(1 + B/Kms + D/Kmp);
end
Reversible_Michaelis_Menten_Keq__rev__1 is "Reversible Michaelis Menten Keq (rev)_1";

function Allosteric_regulation_inhib__rev(Kcat, E, Kms, S, P, Keq, Kmp, L0, I, Ki)
  E*Kcat*(S/Kms - P/Kms/Keq)*(1/(1 + S/Kms + P/Kmp))*1/(1 + L0*(1/(1 + S/Kms + P/Kmp))*(1 + I/Ki));
end
Allosteric_regulation_inhib__rev is "Allosteric regulation inhib (rev)";

function Allosteric_regulation_activator__rev(E, Kcat, Kms, S, P, Keq, Kmp, L0, A, Ka)
  E*Kcat*(S/Kms - P/Kms/Keq)*(1/(1 + S/Kms + P/Kmp))*1/(1 + L0*(1/(1 + S/Kms + P/Kmp)/(1 + A/Ka)));
end
Allosteric_regulation_activator__rev is "Allosteric regulation activator (rev)";

function Reversible_Michaelis_Menten_Keq__rev__2(C, D, E4, Kcat, Keq, Kmp, Kms)
  E4*Kcat*(C/Kms - D/Kms/Keq)*1/(1 + C/Kms + D/Kmp);
end
Reversible_Michaelis_Menten_Keq__rev__2 is "Reversible Michaelis Menten Keq (rev)_2";

function Competitive_inhibition_Keq__rev__1(A, B, D, E1, Kcat, Keq, Ki, Kmp, Kms)
  E1*Kcat*(A/Kms - B/Kms/Keq)*1/(1 + A/Kms + B/Kmp + D/Ki);
end
Competitive_inhibition_Keq__rev__1 is "Competitive inhibition Keq (rev)_1";

model ExampleODE()

  // Compartments:
  compartment Cytosol = 1;

  // Species:
  species $A in Cytosol = 5;
  species B in Cytosol = 1;
  species C in Cytosol = 1;
  species $D in Cytosol = 0.5;
  species $E1 in Cytosol = 1;
  species $E2A in Cytosol = 2;
  species $E2B in Cytosol = 3;
  species $E3 in Cytosol = 2;
  species $E4 in Cytosol = 3;

  // Reactions:
  r1: $A -> B; Cytosol*Competitive_inhibition_Keq__rev__1(A, B, D, E1, r1_Kcat, r1_Keq, r1_Ki, r1_Kmp, r1_Kms);  // modifiers: E1, D
    r1_Kcat = 0.5; r1_Keq = 25.2536; r1_Ki = 1; r1_Kmp = 1; r1_Kms = 0.5;
  r2a: $A -> C; Cytosol*Allosteric_regulation_activator__rev(E2A, r2a_Kcat, r2a_Kms, A, C, r2a_Keq, r2a_Kmp, r2a_L0, C, Ka);  // modifiers: E2A
    r2a_Kcat = 2; r2a_Kms = 2; r2a_Keq = 7.52405; r2a_Kmp = 0.5; r2a_L0 = 1; Ka = 0.3;
  r3: B -> $D; Cytosol*Reversible_Michaelis_Menten_Keq__rev__1(B, D, E3, r3_Kcat, r3_Keq, r3_Kmp, r3_Kms);  // modifiers: E3
    r3_Kcat = 2; r3_Keq = 2.24172; r3_Kmp = 2; r3_Kms = 0.5;
  r4: C -> $D; Cytosol*Reversible_Michaelis_Menten_Keq__rev__2(C, D, E4, r4_Kcat, r4_Keq, r4_Kmp, r4_Kms);  // modifiers: E4
    r4_Kcat = 1; r4_Keq = 7.52405; r4_Kmp = 3; r4_Kms = 1;
  r2b: $A -> C; Cytosol*Allosteric_regulation_inhib__rev(r2b_Kcat, E2B, r2b_Kms, A, C, r2b_Keq, r2b_Kmp, r2b_L0, C, r2b_Ki);  // modifiers: E2B
    r2b_Kcat = 1; r2b_Kms = 1; r2b_Keq = 7.52405; r2b_Kmp = 2; r2b_L0 = 1; r2b_Ki = 0.9;

  // Unit definitions:
  unit length = metre;
  unit area = metre^2;
  unit volume = litre;
  unit time = second;
  unit substance = mole;
end
