// SBML level 2 version 4

function r3_0(E3, Kcat_r3, B, Kms_r3, D, Keq_r3, Kmp_r3)
  E3*Kcat_r3*(B/Kms_r3 - D/Kms_r3/Keq_r3)*1/(1 + B/Kms_r3 + D/Kmp_r3);
end

function r2a(E, Kcat_r2a, S, Kms_r2a, P, Kmp_r2a, L0_r2a, A, Ka_r2a, Keq_r2)
  E*Kcat_r2a*(S/Kms_r2a - P/Kms_r2a/Keq_r2)*(1/(1 + S/Kms_r2a + P/Kmp_r2a))*1/(1 + L0_r2a*(1/(1 + S/Kms_r2a + P/Kmp_r2a)/(1 + A/Ka_r2a)));
end

function r4_0(E4, Kcat_r4, C, Kms_r4, D, Keq_r4, Kmp_r4)
  E4*Kcat_r4*(C/Kms_r4 - D/Kms_r4/Keq_r4)*1/(1 + C/Kms_r4 + D/Kmp_r4);
end

function r1_0(E, Kcat_r1, S, Kms_r1, P, Keq_r1, Kmp_r1, I, Ki_r1)
  E*Kcat_r1*(S/Kms_r1 - P/Kms_r1/Keq_r1)*1/(1 + S/Kms_r1 + P/Kmp_r1 + I/Ki_r1);
end

function r2b_0(E, Kcat_r2b, S, Kms_r2b, P, Kmp_r2b, L0_r2b, I, Ki_r2b, Keq_r2)
  E*Kcat_r2b*(S/Kms_r2b - P/Kms_r2b/Keq_r2)*(1/(1 + S/Kms_r2b + P/Kmp_r2b))*1/(1 + L0_r2b*(1/(1 + S/Kms_r2b + P/Kmp_r2b))*(1 + I/Ki_r2b));
end

model ExampleODE()

  // Compartments:
  compartment Cytosol = 1;

  // Species:
  species $A in Cytosol = 5;
  species B in Cytosol = 1;
  species C in Cytosol = 1;
  species $D in Cytosol = 0.5;
  species $E1 in Cytosol = 1;
  species $E2A in Cytosol = 2;
  species $E2B in Cytosol = 3;
  species $E3 in Cytosol = 2;
  species $E4 in Cytosol = 3;

  // Reactions:
  r1: $A -> B; Cytosol*r1_0(E1, Kcat_r1, A, Kms_r1, B, Keq_r1, Kmp_r1, D, Ki_r1);  // modifiers: E1, D
    Kcat_r1 = 0.5; Kms_r1 = 0.5; Keq_r1 = 25.2536; Kmp_r1 = 1; Ki_r1 = 1;
  r2: $A -> C; Cytosol*r2a(E2A, Kcat_r2a, A, Kms_r2a, C, Kmp_r2a, L0_r2a, C, Ka_r2a, r2_Keq_r2); r2 is "r2a";  // modifiers: E2A
    Kcat_r2a = 2; Kms_r2a = 2; Kmp_r2a = 0.5; L0_r2a = 1; Ka_r2a = 0.3; r2_Keq_r2 = 7.52405;
  r3: B -> $D; Cytosol*r3_0(E3, Kcat_r3, B, Kms_r3, D, Keq_r3, Kmp_r3);  // modifiers: E3
    Kcat_r3 = 2; Kms_r3 = 0.5; Keq_r3 = 2.24172; Kmp_r3 = 2;
  r4: C -> $D; Cytosol*r4_0(E4, Kcat_r4, C, Kms_r4, D, Keq_r4, Kmp_r4);  // modifiers: E4
    Kcat_r4 = 1; Kms_r4 = 1; Keq_r4 = 7.52405; Kmp_r4 = 3;
  r2b: $A -> C; Cytosol*r2b_0(E2B, Kcat_r2b, A, Kms_r2b, C, Kmp_r2b, L0_r2b, C, Ki_r2b, r2b_Keq_r2);  // modifiers: E2B
    Kcat_r2b = 1; Kms_r2b = 1; Kmp_r2b = 2; L0_r2b = 1; Ki_r2b = 0.9; r2b_Keq_r2 = 7.52405;

  // Unit definitions:
  unit length = metre;
  unit area = metre^2;
  unit volume = litre;
  unit time = second;
  unit substance = mole;
end
